Δd2 := 0.00005
k := 0.0022
d1 := 0.02400
d2 := 0.02315
Δstrich := 0.1
Δd1 := 0.00005
strich := 4.2
Δk := 0.000012
fu(k) := strich*k/(π*(d1 + d2))
σ := sqrt((d/dd1(strich*k/(π*(d1 + d2)))*Δd1)^2 + (d/dd2(strich*k/(π*(d1 + d2)))*Δd2)^2 + (d/dk(strich*k/(π*(d1 + d2)))*Δk)^2 + (d/dt(strich*k/(π*(d1 + d2)))*Δstrich)^2)  # error: This variable is undefined.
σ → 0.000352876898599 = 0.000352877
